f(x) := 4*(x^2 + 1)*ln(x) - 1
x := 0.8, 0.85 .. 1.4
F(x) := d/dx(f(x))
S(x) := d^2/dx^2(f(x))
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x = [0.8; 0.85; 0.9; 0.95; 1; 1.05; 1.1; 1.15; 1.2; 1.25; 1.3; 1.35; 1.4]
f(x) = [-2.46382; -2.11976; -1.76281; -1.39034; -1; -0.589675; -0.157458; 0.298388; 0.779458; 1.28722; 1.82304; 2.38818; 2.98383]
F(x) = [6.77188; 7.00075; 7.28585; 7.6207; 8; 8.41936; 8.87509; 9.36407; 9.88362; 10.4314; 11.0055; 11.6041; 12.2256]
S(x) = [3.96485; 5.16352; 6.21884; 7.15752; 8; 8.7622; 9.4567; 10.0935; 10.6808; 11.2251; 11.7321; 12.206; 12.651]
